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# T: The device remperature in Kelvin
# Id: The forward current through the circuit
# Rf: The forward built in resistance of the semiconductor material
# Ψ: The junction barrier potential
# ec: Electron charge
# k: Boltzman constant
Id - Is*e^(-e_c*Ψ/(k*T))*(e^(e_c*(V - Id*Rf)/(k*T)) - 1) == 0
Is(T, Vin, Id, Ψ, Rf) := Id*e^(e_c/(T*k)*Ψ)/(e^(e_c/(T*k)*(Vin - Id*Rf)) - 1)
Rf(T, Vin, Id, Ψ, Is) := Vin/Id - k*T/(Id*e_c)*ln(1 + Id/Is*e^(e_c/(k*T)*Ψ))
Ψ(T, V, Id, Rf) := -T*k/e_c*ln(Id/(e^(e_c/(T*k)*(V - Rf*Id)) - 1))
Id(T, Vin, Rf, Ψ, Is) := k*T/(e_c*Rf)*LambertW(e_c*Rf*Is/(k*T)*e^(e_c*Vin/(k*T) - e_c*Ψ/(k*T) + e_c*Rf*Is/(k*T)*e^(-e_c*Ψ/(k*T)))) - Is*e^(-e_c*Ψ/(k*T))
