Vpn(V_diode, I_diode, R_series) := V_diode - I_diode*R_series
I_diode == e^(-e_c*Ψ/(k*T))*(e^(e_c*(V_diode - I_diode*R_series)/(k*T)) - 1)
R_series(V_diode, I_diode, Ψ, T) := (e_c*V_diode - T*k*ln(I_diode*e^(Ψ*e_c/(T*k)) + 1))/(e_c*I_diode)
Ψ(V_diode, I_diode, R_series, T) := -T*k*ln(I_diode/(e^(e_c*(V_diode - I_diode*R_series)/(T*k)) - 1))/e_c
I_diode(V_diode, T, R_series, Ψ) := -(e_c*R_series*e^(-Ψ*e_c/(T*k)) - T*k*LambertW(e_c*R_series*e^((e_c*V_diode - Ψ*e_c + e_c*R_series*e^(-Ψ*e_c/(T*k)))/(T*k))/(T*k)))/(e_c*R_series)
Rf := 40 Ω
e_c = 1.60218e-19 C
k = 1.38065e-23 kg*m^2/(s^2*K)
T := (21 + 273.14) K = 294.14 K
Vd := 0.3 V
Ψ := 0.5 V
e^(-e_c*Ψ/(k*T)) = 2.71043e-9
e_c/(k*T) = 39.4523 1/V
k*T/e_c = 0.0253471 V
