q := 1.602176487*10^-19
e_c = 1.60218e-19 C
K := 1.3806504*10^-23
k = 1.38065e-23 kg*m^2/(s^2*K)
Is(Ψ, T) := e^(-q*Ψ/(K*T))
Ψ := 0.4, 0.41 .. 0.5
T := 273, 274 .. 300
I1 := Is(0.6, 273) = 8.38642e-12
I2 := Is(0.6, 300) = 8.32635e-11
I2/I1 = 9.92837
I1 := Is(0.4, 273) = 4.12779e-8
I2 := Is(0.6, 273) = 8.38642e-12
I2/I1 = 0.00020317
# [3D plot: Is(Ψ, T)]
